# AguaClara Water Treatment Plants
# Design References
# MathCAD dimension calculations:
# Variable Naming Guide
# The list below is the list names that can be used before the period for the subscript in our variable names.
# Major Plant Components. These items follow the period in the variable name
# [reference: BasicInputs.xmcd]
# [reference: ExpertInputs.xmcd]
# [reference: MathFunctions.xmcd]
# [reference: PipeDatabase.xmcd]
# [reference: FluidsFunctions.xmcd]
# [reference: SedimentationTank.xmcd]
# [reference: Flocculator.xmcd]
# [reference: LFOM.xmcd]
[
    "Subscripts", "";
    "component key", "Description";
    "Et", "Entrance tank";
    "Lfom", "Linear flow orifice meter";
    "Rm", "Rapid mix";
    "Floc", "Flocculation tank";
    "Sed", "Sedimentation tank";
    "Fi", "Stacked Rapid Sand Filter"
]
# [reference: LinearCdc.xmcd]
# [reference: ChemStorageTanks.xmcd]
# [reference: EntranceTank.xmcd]
# [reference: StackedRapidSandFilter.xmcd]
# [reference: MaterialsList.xmcd]
# AutoCAD drawing programs:
# Translators:
# These are the codes that take MathCAD outputs and create AutoCAD scripts that are used to draw the plant (formerly Basics)
# [reference: MtoATranslators.xmcd]
# The wrapped MtoA translator contains the functions that the user will want to access. These functions will draw pieces with full functionality - specifying the location, dimension, and orientation of the object. Also, it contains layer control and subtraction capabilities for grouped objects.
# [reference: MtoATranslatorsWrapped.xmcd]
# Plant Elements:
# These are all of the files that draw the fundamental parts of the plants (tees, elbows, tanks, pipes, etc)
[
    "Symbol", "Description", "Dimensions";
    "Amp", "amplitude", "L";
    "B", "perpendicular distance between components (center to center)", "L";
    "D", "Diameter", "L";
    "E", "pipe roughness", "L";
    "FB", "Freeboard", "L";
    "H", "height (includes freeboard)", "L";
    "HL", "head loss", "L";
    "HW", "local water depth", "L";
    "ID", "inner diameter", "L";
    "L", "length", "L";
    "Loc", "Locations", "L";
    "ND", "nominal diameter", "L";
    "OD", "outer diameter", "L";
    "R", "Radius", "L";
    "S", "space between components", "L";
    "T", "thickness", "L";
    "W", "width", "L";
    "Z", "elevation relative to bottom of sed tank", "L";
    "ZW", "water depth relative to bottom of sed tank", "L";
    "V", "velocity", "L/T";
    "CP", "Collision Potential", "L^(2/3)";
    "A", "Area", "L^2";
    "Nu", "kinematic viscosity", "L^2/T";
    "ED", "energy dissipation rate", "L^2/T^3";
    "Vol", "volume", "L^3";
    "Q", "flow", "L^3/T";
    "MW", "Molecular weight", "M";
    "C", "Concentration", "M/L^3";
    "Rho", "Density", "M/L^3";
    "AN", "angle", "radians";
    "Ti", "time", "T";
    "EN", "Enumerated type", "dimensionless";
    "N", "Number", "dimensionless";
    "Pi", "dimensionless geometric ratio", "";
    "AC", "AutoCAD command string", "";
    "K", "minor loss coefficient", ""
]
# [reference: ChannelF.xmcd]
# [reference: PlumbingF.xmcd]
# [reference: TankF.xmcd]
# [reference: StairsF.xmcd]
# [reference: DrainChannelF.xmcd]
# Specific Pieces:
# These are the codes that draw the bigger pieces of the plant (the sed tank, floc tank, etc)
# [reference: FlocculatorAC.xmcd]
# [reference: SedimentationTankAC.xmcd]
# [reference: EntranceTankAC.xmcd]
# [reference: ChemStockTanksAC.xmcd]
# [reference: StackedRapidSandFilterAC.xmcd]
# [reference: CdcAC.xmcd]
# [reference: OperatorAccessAC.xmcd]
# AutoCAD Materials:
# Adds the option of assigning materials to the entire plant design.
# [reference: MaterialsAC.xmcd]
# Layouts:
# [reference: LayoutsAC.xmcd]
# Sedimentation
# Sed Tanks and Slopes:
N_SedTanks = 3
L_Sed = 6.22193 m
N_SedBays = 2  # Number of bays of inlet manifolds in each sed tank
# Length of the port through which water exits the inlet manifold
# Width of ferrous cement plates in whice one manifold port is cut
Q_SedBay = 5.33333 L/s
# Sedimentation Tank Sludge Drain:
N_SedSludgeOrifices = 48  # per cell
Ti_SludgeDrain = 30 min  # Tank Drain time
W_SedSludge = 9.14686 cm  # Width of the sludge channel
B_SedSludgeOrifices = 10.4019 cm  # Distance center to center between drain orifices
# Depth of the sludge channel
H_SedSludge = 9.14686 cm
W_SedDrainCover = 13.1469 cm
D_SedSludgeOrifice = 0.00924418 m  # Diameter of drain orifices
N_SedSludgeOrifices = 48
# Sedimentation Tank Dimensions:
Z_SedSludge = 0.0914686 m  # Height from 0 of the top of the sludge drain
# Height from 0 of the top of the inlet manifold
W_Sed = 2.1336 m
L_Sed = 6.22193 m  # Total tank length
# Inlet Channel:
HW_SedInletChannel = 0.38815 m  # Width of the drop chimneys connecting channel to sed inlet manifolds
W_SedInletChannel = 0.578538 m  # length of drop chimmneys
L_SedChannel = 6.7008 m
H_SedInletChannel = 0.48815 m
# Sedimentation Tank Effluent Launder:
N_SedLaunderOrifices = 49  # Number of orifices per launder  # More Launder Dimensions
ND_SedLaunder = 6 in
Q_SedLaunderOrifices = 0.000108844 m^3/s
# Center to center launder spacing
L_SedLaunder = 5.0882 m
B_SedLaunderOrifices = 0.1 m
D_SedLaunderOrifice = 0.625 in
# Exit Channel:
W_SedExitChannel = 0.3485 m
H_SedExitChannel = 0.48815 m
HW_SedExitChannel = 0.34815 m  # water height in exit channel from 0
# Lamella:
L_SedPlate = 0.6 m  # center to center distance between lamella
B_SedPlate = 2.7 cm  # spacing between lamella
S_SedPlate = 2.5 cm
N_SedPlates = 160  # Number of Sed Plates per Sedimentation Tank Bay.
AN_SedPlate = 60 deg
V_SedC =  # error: This variable is undefined.
L_SedActive = 4.986 m
V_SedUp = 86.3048 m/day
Z_SedLaunder = 1.69659 m
N_SedPlates = 160
HW_Sed = 1.81957 m
H_Sed = 1.93973 m
# Flocculator
# Look at Flocculator Positioning arrays
W_FlocChannel = 0.58 m
# Fill last channel with bafffles from last channel
ED_Floc = 10 mW/kg
# Fix port width to be based on energy dissipation in that channel
# Adjust spacing after the number of baffles per channel is known.
HW_FlocEnd = 1.81957 m
# Check the residence time of the flocculator should be at least 20minutes
X_FlocBaffles = [
    0.442566, 0.442566, 0.442566, 0.887133;
    0.887133, 0.887133, 0.887133, 1.3317;
    1.3317, 1.3317, 1.3317, 1.77627;
    1.77627, 1.77627, 1.77627, 2.22083;
    2.22083, 2.22083, 2.22083, 2.6654;
    2.6654, 2.6654, 2.6654, 3.10996;
    3.10996, 3.10996, 3.10996, 3.55453;
    3.55453, 3.55453, 3.55453, 3.9991;
    3.9991, 3.9991, 3.9991, 4.44366;
    4.44366, 4.44366, 4.44366, 4.88823;
    4.88823, 4.88823, 4.88823, 5.3328;
    5.3328, 5.3328, 5.3328, 5.77736;
    5.77736, 5.77736, 5.77736, 0
] m
L_FlocBaffles = [
    1.15572, 1.15572, 1.15572, 1.29288;
    1.29288, 1.29288, 1.29288, 1.15572;
    1.15572, 1.15572, 1.15572, 1.29288;
    1.29288, 1.29288, 1.29288, 1.15572;
    1.15572, 1.15572, 1.15572, 1.29288;
    1.29288, 1.29288, 1.29288, 1.15572;
    1.15572, 1.15572, 1.15572, 1.29288;
    1.29288, 1.29288, 1.29288, 1.15572;
    1.15572, 1.15572, 1.15572, 1.29288;
    1.29288, 1.29288, 1.29288, 1.15572;
    1.15572, 1.15572, 1.15572, 1.29288;
    1.29288, 1.29288, 1.29288, 1.15572;
    1.15572, 1.15572, 1.15572, 0
] m
Z_FlocBaffles = [
    0, 0, 0, 0.66385;
    0.66385, 0.66385, 0.66385, 0;
    0, 0, 0, 0.66385;
    0.66385, 0.66385, 0.66385, 0;
    0, 0, 0, 0.66385;
    0.66385, 0.66385, 0.66385, 0;
    0, 0, 0, 0.66385;
    0.66385, 0.66385, 0.66385, 0;
    0, 0, 0, 0.66385;
    0.66385, 0.66385, 0.66385, 0;
    0, 0, 0, 0.66385;
    0.66385, 0.66385, 0.66385, 0;
    0, 0, 0, 0
] m
N_FlocChannels = 4
L_FlocTank =  # error
HL_Floc = 8.71624 cm
HW_FlocStart = 1.90673 m
S_FlocBaffle = [44.2566; 44.2566; 44.2566; 44.2566] cm
B_FlocBaffle = [44.4566; 44.4566; 44.4566; 44.4566] cm
N_FlocChannelBaffles = [13; 13; 13; 12]
W_FlocPort = [0.422566; 0.422566; 0.422566; 0.388538] m
HL_FlocChannels =  # error
L_FlocBaffleLower = 1.15572 m
L_FlocBaffleUpper = 1.29288 m
H_FlocPort = [0.911177; 0.911177; 0.911177; 0.911177] m
Ti_Floc =  # error  # residence time of the flocculator
N_FlocBaffles =  # error
# Materials List
N_Valves = 6
N_ValveCouplings = 6
N_SedPlatesTotal = 960
N_SedPlatesPerSheet = 5
N_SedPlateSheets = 192
AC_SedTank =  # no stored result
AC_EntranceTank =  # no stored result
AC_FlocTank =  # no stored result
AC_Filter =  # no stored result
AC_ChemTanks =  # no stored result
AC_OperatorAccess = [
    "-layer m OpWalkwayCon"; "c t 132,132,132"; "OpWalkwayCon"; "  "; "_-view o f"; "_pline"; "-10.24658,2.7644"; "-9.94658,2.7644"; "-9.94658,2.57686"; "-9.64658,2.57686"
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]
AC_Cdc = [
    "-layer m Cdc";
    "c t 125,0,160";
    "Cdc";
    "  ";
    "-insert https://confluence.cornell.edu/download/attachments/173604905/CdcLeverArm.dwg";
    "-5.95128,11.08907,2.4766 x 1 1  270";
    "-insert https://confluence.cornell.edu/download/attachments/173604905/CdcLeverArmBracket.dwg";
    "-6.36403,11.05707,2.4517 x 1 1  270";
    "-insert https://confluence.cornell.edu/download/attachments/173604905/CdcCht.dwg";
    "-7.29738,11.08907,2.5694 x 1 1  90"
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]
AC_Layout = ["laythw -view _SEISO "]
AC_MatApply = [
    "-insert https://confluence.cornell.edu/download/attachments/173604905/CdcLeverArm.dwg"; "0,0,0 x 1 1  0"; "-layer"; "material"; "Flat - Polished Gray"; "*con"; "  "; "-layer"; "material"; "PVC - White"
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]
# AutoCAD Scripts
